OpenVSP model (file version 5), 5 components.
Geometry view with OpenVSP parameter names; values to 6 digits, angles in degrees, lengths in the model's unit.
Overall bounding box: X_Min=0 X_Len=39.236 Y_Min=-17.12 Y_Len=34.24 Z_Min=-3.21353 Z_Len=13.2535

Fuselage "Fuselage"
  location (X Y Z) 0 0 0, rotation 0 0 0
  bounding box size 37.97 4.0095 4.19623
  Design: Length=37.97
  cross sections:
    n  XLocPercent  YLocPercent  ZLocPercent  shape
    0  0            0            0            point
    1  0.0298912    0            -0.00131683  ellipse Ellipse_Height=1.83 Ellipse_Width=1.64
    2  0.0848741    0            0.00500395   ellipse Ellipse_Height=3.49 Ellipse_Width=2.85
    3  0.181099     0            0.0092178    ellipse Ellipse_Height=3.84 Ellipse_Width=3.78
    4  0.370445     0            0.0092178    as above
    5  0.668115     0            0.0092178    as above
    6  1            0            0.0434783    ellipse Ellipse_Height=1.07 Ellipse_Width=0

Wing "Wing", child of "Fuselage"
  location (X Y Z) 14 0 -0.87, rotation 0 0 0
  symmetric about XZ
  bounding box size 10.7738 34.24 2.12614
  totals: TotalSpan=34.3767 TotalProjectedSpan=34.24 TotalChord=3.08045 TotalArea=120.797 TotalAR=9.70539 MAC=4.32889 RelativeDihedralFlag=1 RelativeTwistFlag=1
  root: chord 7.28683, twist 0, NACA 4-series Camber=0 CamberLoc=0.2 ThickChord=0.15455
  sections:
    n  Span     Root_Chord  Tip_Chord  Area     Sweep  Sweep_Location  Dihedral  Twist  Twist_Location  tip airfoil
    1  5.46742  7.28683     3.96415    30.7569  0      1               5.11      0      0.25            NACA 4-series Camber=0 CamberLoc=0.2 ThickChord=0.1
    2  10.9398  3.96415     1.31546    28.8791  26     0.25            0         0      0.25            as above
    3  0.78106  1.31546     0.636631   0.76235  10     1               0         0      0.25            as above
  SS_Control "Aileron": UStart=0.480392 UEnd=0.578431 Length_C_Start=0.236111 Length_C_End=0.236111 Length_Start=0.6846 Length_End=0.37804 LE_Flag=0 Surf_Type=2
  SS_Control "Flaps": UStart=0.262799 UEnd=0.477816 Length_C_Start=0.210526 Length_C_End=0.210526 Length_Start=1.31442 Length_End=0.617599 LE_Flag=0 Surf_Type=2
  SS_Control "Slats": UStart=0.405882 UEnd=0.583333 Length_C_Start=0.25 Length_C_End=0.25 Length_Start=0.971563 Length_End=0.384046 LE_Flag=1 Surf_Type=2

Wing "Horizontal_Tail", child of "Fuselage"
  location (X Y Z) 33 0 1.413, rotation 0 0 0
  symmetric about XZ
  bounding box size 6.23597 14.306 1.51166
  totals: TotalSpan=14.46 TotalProjectedSpan=14.306 TotalChord=2.5 TotalArea=36.15 TotalAR=5.66145 MAC=2.8
  root: chord 4, twist 0, NACA 4-series Camber=0 CamberLoc=0.2 ThickChord=0.20455
  sections:
    n  Span  Root_Chord  Tip_Chord  Area    Sweep    Sweep_Location  Dihedral  Twist  Twist_Location  tip airfoil
    1  7.23  4           1          18.075  31.8182  0.25            8.36957   0      0.25            NACA 4-series Camber=0 CamberLoc=0.2 ThickChord=0.1
  SS_Control "Elevators": UStart=0.368601 UEnd=0.631399 Length_C_Start=0.25 Length_C_End=0.25 Length_Start=0.920648 Length_End=0.329352 LE_Flag=0 Surf_Type=2

Wing "Vertical_Tail", child of "Fuselage"
  location (X Y Z) 28.587 0 2.1, rotation 90 0 0
  bounding box size 10.0228 0.846324 7.94
  totals: TotalSpan=7.94 TotalProjectedSpan=7.94 TotalChord=4.5902 TotalArea=28.7268 TotalAR=2.19459 MAC=4.61487
  root: chord 8.45833, twist 0, NACA 4-series Camber=0 CamberLoc=0.2 ThickChord=0.1
  sections:
    n  Span  Root_Chord  Tip_Chord  Area     Sweep    Sweep_Location  Dihedral  Twist  Twist_Location  tip airfoil
    1  1.9   8.45833     4.45123    12.2641  60       0.25            0         0      0.25            as above
    2  6.04  4.45123     1          16.4627  32.6309  0.25            0         0      0.25            as above
  SS_Control "Rudder": UStart=0.279863 UEnd=0.744027 Length_C_Start=0.25 Length_C_End=0.25 Length_Start=1.99492 Length_End=0.270614 LE_Flag=0 Surf_Type=2

BodyOfRevolution "BORGeom", child of "Fuselage"
  location (X Y Z) 15.2717 5.65217 -1.95652, rotation 0 0 0
  symmetric about XZ
  bounding box size 1 13.8184 2.51402
  Design: A0=1.80033 Ae=1.80033 Amin=0.207514 AminW=0.25 Angle=0 Diameter=1.51402 Mode=0
  profile: circle Circle_Diameter=1

VSPAERO settings (reference component "Wing"): Sref=120.797 bref=34.3767 cref=4.329 Xcg=0 Ycg=0 Zcg=0 AlphaStart=1 AlphaEnd=5.5 AlphaNpts=3 BetaStart=-5 BetaEnd=5 BetaNpts=3 MachStart=0.3 MachEnd=0 MachNpts=1 ReCref=1e+07 Vinf=100 Rho=0.002377
  control group "Flaps": DeflectionAngle=0
  control group "Slats": DeflectionAngle=0
  control group "Aileron": DeflectionAngle=0
  control group "Elevators": DeflectionAngle=5
  control group "Rudder": DeflectionAngle=0
